# Wing weight
# Date de intrare:
S_w := 9.18*m^2 = 98.8127 ft^2
A := 24.51
Λ := 1.22*deg = 0.021293
ρ := 1.225*kg/m^3 = 0.0764743 lb/ft^3
u := 50*m/s = 164.042 ft/s
q := 1/2*ρ*u^2 = 31.9808 lbf/ft^2
λ := 3.33
tc := 14.8/100
N_z := 1.5*6 = 9
W_dg := 400 kg = 881.849 lb
W_wing := 0.036*(S_w/ft^2)^0.758*(A/cos(Λ)^2)^0.6*(q*ft^2/lbf)^0.006*λ^0.04*(100*tc*1/cos(Λ))^-0.3*(N_z*W_dg/lb)^0.49*lb = 140.735 kg
# Hotizontal tail weight
S_ht := 1.16*m^2 = 12.4861 ft^2
tc_h := 9.8/100
Λ_ht := 8.89*deg = 0.15516
λ_h := 2.62
W_horizontalTail := 0.016*(N_z*W_dg/lb)^0.414*(q*ft^2/lbf)^0.168*(S_ht/ft^2)^0.896*(100*tc_h/cos(Λ))^-0.12*(A/cos(Λ_ht)^2)^0.043*λ_h^-0.02*lb = 4.3987 kg
# Vertical tail weight
H_t := 1 m
H_v := 1 m
S_vt := 0.88*m^2 = 9.47224 ft^2
Λ_vt := 6.62*deg = 0.115541
λ_vt := 1.27
W_verticalTail := 0.073*(1 + 0.2*H_t/H_v)*(N_z*W_dg/lb)^0.376*(q*ft^2/lbf)^0.122*(S_vt/ft^2)^0.873*(100*tc/cos(Λ_vt))^-0.49*(A/cos(Λ_vt)^2)^0.357*λ_vt^0.039*lb = 10.6841 kg
# Fuselage weight
S_f := 8.645*m^2 = 93.054 ft^2
L_t := (3.710 - 0.66 + 0.49)*m = 11.6142 ft
L := 6.400*m = 20.9974 ft
D := 0.9*m = 2.95276 ft
W_fuselage := (0.052*(S_f/ft^2)^1.086*(N_z*W_dg/lb)^0.177*(L_t/ft)^-0.051*(L/D)^-0.072*(q*s^2*ft/slug)^0.241)*lb = 28.0528 kg
2*π*0.45*6.4 = 18.0956
# Main Landing gear weight
N_l := 1.5*10 = 15
W_l := W_dg = 881.849 lb
L_m := 0.2*m = 0.656168 ft
W_mainLandingGear := 0.095*(N_l*W_l/lb)^0.768*(L_m/(12*ft))^0.409*lb = 19.2072 kg
# Tail Landing gear weight
L_n := 0.2 m
W_noseLandingGear := 0.125*(N_l*W_l/lb)^0.566*(L_n/(12*ft))^0.845*lb = 1.04666 kg
# Flight Controls weight
B_w := 15*m = 49.2126 ft
W_flightControls := 0.053*(L/ft)^1.536*(B_w/ft)^0.371*(N_z*W_dg/lb*10^-4)^0.8*lb = 9.10451 kg
# Avionics weight
W_uav := 10 kg = 22.0462 lb
W_avionics := 2.117*(W_uav/lb)^0.933*lb = 17.2075 kg
# Electrical weight
W_electrical := 12.57*(W_avionics/lb)^0.51*lb = 36.4181 kg
W_wing + W_horizontalTail + W_verticalTail + W_fuselage + W_mainLandingGear + W_noseLandingGear + W_flightControls + W_avionics = 230.436 kg
